OpenVSP model (file version 5), 6 components.
Geometry view with OpenVSP parameter names; values to 6 digits, angles in degrees, lengths in the model's unit.
Overall bounding box: X_Min=13.3783 X_Len=25.687 Y_Min=-17.1829 Y_Len=34.3658 Z_Min=-2.925 Z_Len=12.8458

Wing "main_wing"
  location (X Y Z) 13.61 0 -0.93, rotation 0 0 0
  symmetric about XZ
  bounding box size 11.6131 34.3658 1.81759
  totals: TotalSpan=34.4379 TotalProjectedSpan=34.32 TotalChord=3.28606 TotalArea=127.914 TotalAR=9.20822
  root: chord 7.76, twist 4, airfoil file "BOEING 737 ROOT AIRFOIL"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 BaseThickChord=0.15373 ThickChord=0.1
  sections:
    n  Span      Root_Chord  Tip_Chord  Area      Sweep   Sweep_Location  Dihedral  Twist     Twist_Location  tip airfoil
    1  5.56514   7.76        3.88       32.3891   28.225  0.25            2.5       0.047193  0.25            as above
    2  11.016    3.88        1.7072     30.7742   25      0.25            5.5       0.00258   0.25            airfoil file "BOEING 737 MIDSPAN AIRFOIL"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 BaseThickChord=0.125897 ThickChord=0.1
    3  0.637857  1.7072      0.781975   0.793868  56.75   0.25            5.5       0         0.25            airfoil file "BOEING 737 MIDSPAN AIRFOIL"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 BaseThickChord=0.100396 ThickChord=0.1

Wing "horizontal_stabilizer"
  location (X Y Z) 33.02 0 1.466, rotation 0 0 0
  symmetric about XZ
  bounding box size 6.04535 14.5241 1.33977
  totals: TotalSpan=14.5649 TotalProjectedSpan=14.4 TotalChord=2.84866 TotalArea=41.4905 TotalAR=4.99777
  root: chord 4.2731, twist 0, NACA 4-series Camber=0 CamberLoc=0.2 ThickChord=0.08
  sections:
    n  Span     Root_Chord  Tip_Chord  Area     Sweep   Sweep_Location  Dihedral  Twist  Twist_Location  tip airfoil
    1  7.28245  4.2731      1.42422    20.7452  28.225  0.25            8.63      0      0.25            NACA 4-series Camber=0 CamberLoc=0.2 ThickChord=0.1

Wing "vertical_stabilizer"
  location (X Y Z) 26.944 0 1.54, rotation 90 0 0
  bounding box size 11.5131 0.808523 8.38076
  totals: TotalSpan=8.33 TotalProjectedSpan=8.33 TotalChord=5.09621 TotalArea=34.8925 TotalAR=1.98865
  root: chord 10.1, twist 0, NACA 4-series Camber=0 CamberLoc=0.2 ThickChord=0.08
  sections:
    n  Span     Root_Chord  Tip_Chord  Area     Sweep   Sweep_Location  Dihedral  Twist  Twist_Location  tip airfoil
    1  2.46735  10.1        4.545      18.0671  61.485  0.25            0         0      0.25            NACA 4-series Camber=0 CamberLoc=0.2 ThickChord=0.1
    2  5.86265  4.545       1.19483    16.8253  31.2    0.25            0         0      0.25            as above

Stack "turbofan_1"
  location (X Y Z) 13.72 -4.86 -1.9, rotation 0 0 0
  bounding box size 4.78333 2.05 2.05
  cross sections:
    n  XDelta  YDelta  ZDelta  shape
    0  0       0       0       point
    1  0       0       0       circle Circle_Diameter=2.05
    2  4.1     0       0       as above
    3  0       0       0       point

Stack "turbofan_2"
  location (X Y Z) 13.72 4.86 -1.9, rotation 0 0 0
  bounding box size 4.78333 2.05 2.05
  cross sections:
    n  XDelta  YDelta  ZDelta  shape
    0  0       0       0       point
    1  0       0       0       circle Circle_Diameter=2.05
    2  4.1     0       0       as above
    3  0       0       0       point

Fuselage "fuselage"
  location (X Y Z) 0 0 0, rotation 0 0 0
  bounding box size 38.02 3.9339 3.96665
  Design: Length=38.02
  cross sections:
    n   XLocPercent  YLocPercent  ZLocPercent  shape
    0   0            0            -0.00144     point
    1   0.00576      0            -0.00144     ellipse Ellipse_Height=0.75 Ellipse_Width=0.65
    2   0.02017      0            0            ellipse Ellipse_Height=1.52783 Ellipse_Width=1.20043
    3   0.0317       0            0            ellipse Ellipse_Height=1.96435 Ellipse_Width=1.52783
    4   0.04899      0            0.00431      ellipse Ellipse_Height=2.72826 Ellipse_Width=1.96435
    5   0.07781      0            0.00861      ellipse Ellipse_Height=3.49217 Ellipse_Width=2.61913
    6   0.10375      0            0.01005      ellipse Ellipse_Height=3.7013 Ellipse_Width=3.05565
    7   0.16427      0            0.01148      ellipse Ellipse_Height=3.9287 Ellipse_Width=3.71043
    8   0.22478      0            0.01148      ellipse Ellipse_Height=3.9287 Ellipse_Width=3.9287
    9   0.69164      0            0.01292      ellipse Ellipse_Height=3.81957 Ellipse_Width=3.81957
    10  0.71758      0            0.01292      as above
    11  0.78098      0            0.01722      ellipse Ellipse_Height=3.49217 Ellipse_Width=3.71043
    12  0.85303      0            0.02296      ellipse Ellipse_Height=3.05565 Ellipse_Width=3.16478
    13  0.91931      0            0.03157      ellipse Ellipse_Height=2.40087 Ellipse_Width=1.96435
    14  1            0            0.04593      ellipse Ellipse_Height=1.0913 Ellipse_Width=0.21826
    15  1            0            0.04593      point
