OpenVSP model (file version 5), 6 components.
Geometry view with OpenVSP parameter names; values to 6 digits, angles in degrees, lengths in the model's unit.
Overall bounding box: X_Min=-1.68115 X_Len=9.77535 Y_Min=-6.64446 Y_Len=13.2889 Z_Min=-0.467832 Z_Len=2.94765

Wing "main_wing"
  location (X Y Z) 1.778 0 1, rotation 0 0 0
  symmetric about XZ
  bounding box size 1.57002 9.83515 0.523596
  totals: TotalSpan=9.78234 TotalProjectedSpan=9.73667 TotalChord=1.06859 TotalArea=10.3983 TotalAR=9.11715
  root: chord 1.57002, twist 0, NACA 4-series Camber=0 CamberLoc=0.2 ThickChord=0.15
  sections:
    n  Span     Root_Chord  Tip_Chord  Area     Sweep  Sweep_Location  Dihedral  Twist  Twist_Location  tip airfoil
    1  2.38488  1.57002     1.02051    3.08905  0      0.25            7.93478   0      0.25            as above
    2  2.50629  1.02051     0.663332   2.1101   0      0.25            0         0      0.25            as above

Wing "v_tail"
  location (X Y Z) 5.16722 0 0.469913, rotation 0 0 0
  symmetric about XZ
  bounding box size 1.71768 4.31465 1.34253
  totals: TotalSpan=4.92322 TotalProjectedSpan=4.26363 TotalChord=0.864386 TotalArea=4.25556 TotalAR=4.27172
  root: chord 1.19351, twist 0, NACA 4-series Camber=0 CamberLoc=0.2 ThickChord=0.12
  sections:
    n  Span     Root_Chord  Tip_Chord  Area     Sweep    Sweep_Location  Dihedral  Twist  Twist_Location  tip airfoil
    1  2.46161  1.19351     0.53526    2.12778  22.4647  0.25            30        0      0.25            as above

Fuselage "fuselage"
  location (X Y Z) 0 0 0, rotation 0 0 0
  bounding box size 6.46 1.28478 1.64073
  Design: Length=6.46
  cross sections:
    n  XLocPercent  YLocPercent  ZLocPercent  shape
    0  0            0            0            point
    1  0.026        0            0.00849      ellipse Ellipse_Height=0.481 Ellipse_Width=0.553
    2  0.074        0            0.02874      ellipse Ellipse_Height=1 Ellipse_Width=0.912
    3  0.161        0            0.04348      ellipse Ellipse_Height=1.41 Ellipse_Width=1.174
    4  0.284        0            0.05435      ellipse Ellipse_Height=1.62 Ellipse_Width=1.276
    5  0.531        0            0.0510038    ellipse Ellipse_Height=1.409 Ellipse_Width=1.121
    6  0.651        0            0.0563647    ellipse Ellipse_Height=1.11 Ellipse_Width=0.833
    7  0.773        0            0.0614908    ellipse Ellipse_Height=0.78 Ellipse_Width=0.512
    8  1            0            0.0735185    ellipse Ellipse_Height=0.195 Ellipse_Width=0.13
    9  1            0            0.0632242    point

Propeller "PropGeom"
  location (X Y Z) -0.108696 2.28261 1.63043, rotation 0 90 0
  symmetric about XZ
  bounding box size 3.14492 8.07152 0.173939
  Design: Diameter=3.5 NumBlade=3 Beta34=20 UseBeta34Flag=1 Feather=0 Rotate=0 Precone=0 ReverseFlag=0 FoldAngle=0 PropMode=0 AF=151.538 CLi=0.538798 Chord=0.177656 Solidity=0.169649 ConstructXoC=0.5 FeatherAxisXoC=0.5 FeatherOffsetXoC=0
  cross sections:
    n  RadiusFrac  shape
    0  0.2         ellipse Ellipse_Height=0.07 Ellipse_Width=0.14
    1  0.4         NACA 16-series Chord=0.290938 IdealCl=0.7 ThickChord=0.144074
    2  1           NACA 16-series Chord=0.2275 IdealCl=0.2 ThickChord=0.03
  Chord along r/R (cubic Bezier): 0.2: 0.08, 0.333333: 0.15, 0.466667: 0.2, 0.6: 0.2, 0.716667: 0.2, 0.833333: 0.2, 0.95: 0.2, 0.966667: 0.2, 0.983333: 0.2, 1: 0.13
  Twist along r/R (PCHIP): 0.2: 46.75, 0.75: 20, 1: 13
  Thick along r/R (cubic Bezier): 0.2: 0.5, 0.233333: 0.3, 0.266667: 0.225, 0.3: 0.2, 0.4: 0.125, 0.5: 0.115, 0.6: 0.1, 0.733333: 0.075, 0.866667: 0.055, 1: 0.03
  CLI along r/R (cubic Bezier): 0.2: 0, 0.266667: 0.7, 0.333333: 0.7, 0.4: 0.7, 0.466667: 0.7, 0.533333: 0.7, 0.6: 0.7, 0.733333: 0.7, 0.866667: 0.7, 1: 0.2

Propeller "PropGeom2"
  location (X Y Z) 2.28261 4.8913 2.3913, rotation 0 90 0
  symmetric about XZ
  bounding box size 3.14492 13.2889 0.173939
  Design: Diameter=3.5 NumBlade=3 Beta34=20 UseBeta34Flag=1 Feather=0 Rotate=0 Precone=0 ReverseFlag=0 FoldAngle=0 PropMode=0 AF=151.538 CLi=0.538798 Chord=0.177656 Solidity=0.169649 ConstructXoC=0.5 FeatherAxisXoC=0.5 FeatherOffsetXoC=0
  cross sections:
    n  RadiusFrac  shape
    0  0.2         ellipse Ellipse_Height=0.07 Ellipse_Width=0.14
    1  0.4         NACA 16-series Chord=0.290938 IdealCl=0.7 ThickChord=0.144074
    2  1           NACA 16-series Chord=0.2275 IdealCl=0.2 ThickChord=0.03
  blade curves as in "PropGeom"

Propeller "PropGeom"
  location (X Y Z) 6.52174 2.17391 2.06522, rotation 0 90 0
  symmetric about XZ
  bounding box size 3.14492 7.85413 0.173939
  Design: Diameter=3.5 NumBlade=3 Beta34=20 UseBeta34Flag=1 Feather=0 Rotate=0 Precone=0 ReverseFlag=0 FoldAngle=0 PropMode=0 AF=151.538 CLi=0.538798 Chord=0.177656 Solidity=0.169649 ConstructXoC=0.5 FeatherAxisXoC=0.5 FeatherOffsetXoC=0
  cross sections:
    n  RadiusFrac  shape
    0  0.2         ellipse Ellipse_Height=0.07 Ellipse_Width=0.14
    1  0.4         NACA 16-series Chord=0.290938 IdealCl=0.7 ThickChord=0.144074
    2  1           NACA 16-series Chord=0.2275 IdealCl=0.2 ThickChord=0.03
  blade curves as in "PropGeom"

VSPAERO settings: Sref=4.25556 bref=4.92322 cref=0.864386 Xcg=0 Ycg=0 Zcg=0 AlphaStart=1 AlphaEnd=10 AlphaNpts=3 BetaStart=0 BetaEnd=0 BetaNpts=1 MachStart=0 MachEnd=0 MachNpts=1 ReCref=1e+07 Vinf=100 Rho=0.002377
