OpenVSP model (file version 5), 4 components.
Geometry view with OpenVSP parameter names; values to 6 digits, angles in degrees, lengths in the model's unit.
Overall bounding box: X_Min=2.92975 X_Len=5.61823 Y_Min=-5.70178 Y_Len=11.4036 Z_Min=0.203839 Z_Len=2.18684

Wing "main_wing"
  location (X Y Z) 2.93 0 1.01, rotation 0 0 0
  symmetric about XZ
  bounding box size 1.45958 11.4036 0.509664
  totals: TotalSpan=12.0529 TotalProjectedSpan=11.4 TotalChord=1.0658 TotalArea=15.4503 TotalAR=8.41148
  root: chord 1.46, twist 3, airfoil file "NACA 63-412 AIRFOIL"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 BaseThickChord=0.120059 ThickChord=0.12
  sections:
    n  Span      Root_Chord  Tip_Chord  Area      Sweep  Sweep_Location  Dihedral  Twist  Twist_Location  tip airfoil
    1  3.09966   1.46        1.46       4.5255    0      0.25            0         2      0.25            as above
    2  2.48634   1.46        0.9198     2.9585    0      0.25            0         1      0.25            as above
    3  0.440462  0.9198      0.1752     0.241153  53     0.25            75        0      0.25            as above

Wing "horizontal_stabilizer"
  location (X Y Z) 7.7 0 0.25, rotation 0 0 0
  symmetric about XZ
  bounding box size 0.769 3.39232 0.0923217
  totals: TotalSpan=3.3 TotalProjectedSpan=3.3 TotalChord=0.769 TotalArea=2.5377 TotalAR=4.29129
  root: chord 0.769, twist 0, NACA 4-series Camber=0 CamberLoc=0.2 ThickChord=0.12
  sections:
    n  Span  Root_Chord  Tip_Chord  Area     Sweep  Sweep_Location  Dihedral  Twist  Twist_Location  tip airfoil
    1  1.65  0.769       0.769      1.26885  0      0.25            0         0      0.25            as above

Wing "vertical_stabilizer"
  location (X Y Z) 6.75 0 0.5, rotation 90 0 0
  bounding box size 1.79798 0.201259 1.89068
  totals: TotalSpan=1.854 TotalProjectedSpan=1.854 TotalChord=1.1811 TotalArea=2.18976 TotalAR=1.56972
  root: chord 1.6764, twist 0, NACA 4-series Camber=0 CamberLoc=0.2 ThickChord=0.12
  sections:
    n  Span   Root_Chord  Tip_Chord  Area     Sweep  Sweep_Location  Dihedral  Twist  Twist_Location  tip airfoil
    1  1.854  1.6764      0.6858     2.18976  25     0.25            0         0      0.25            as above

Fuselage "fuselage"
  location (X Y Z) 0 0 0, rotation 0 0 0
  bounding box size 8.43788 1.2092 1.46998
  Design: Length=8.43788
  cross sections:
    n   XLocPercent  YLocPercent  ZLocPercent  shape
    0   0            0            0            point
    1   0.00727912   0            0.00250201   ellipse Ellipse_Height=0.166906 Ellipse_Width=0.278021
    2   0.019411     0            0.0012161    ellipse Ellipse_Height=0.31295 Ellipse_Width=0.436578
    3   0.0630857    0            0.00739549   ellipse Ellipse_Height=0.584173 Ellipse_Width=0.673512
    4   0.165376     0            0.0289128    ellipse Ellipse_Height=1.06403 Ellipse_Width=1.0672
    5   0.242637     0            0.0421415    ellipse Ellipse_Height=1.29377 Ellipse_Width=1.18306
    6   0.296017     0            0.0470524    ellipse Ellipse_Height=1.37703 Ellipse_Width=1.18154
    7   0.38094      0            0.0531358    ellipse Ellipse_Height=1.43957 Ellipse_Width=1.17822
    8   0.504685     0            0.0465549    ellipse Ellipse_Height=1.29353 Ellipse_Width=1.05439
    9   0.645415     0            0.0374197    ellipse Ellipse_Height=0.897122 Ellipse_Width=0.850193
    10  0.985107     0            0.0454028    ellipse Ellipse_Height=0.292086 Ellipse_Width=0.201257
    11  1            0            0.0478758    ellipse Ellipse_Height=0.12518 Ellipse_Width=0.120602
    12  1            0            0.0478758    point
