OpenVSP model (file version 5), 20 components.
Geometry view with OpenVSP parameter names; values to 6 digits, angles in degrees, lengths in the model's unit.
Overall bounding box: X_Min=-4.125 X_Len=13.25 Y_Min=-8.625 Y_Len=17.25 Z_Min=-0.352349 Z_Len=2.29485

Wing "main_wing"
  location (X Y Z) 0 0 0, rotation 0 0 0
  symmetric about XZ
  bounding box size 0.01 0.0101008 0.000100769
  totals: TotalSpan=0.01 TotalProjectedSpan=0.01 TotalChord=0.01 TotalArea=0.0001 TotalAR=1
  root: chord 0.01, twist 0, NACA 4-series Camber=0 CamberLoc=0.2 ThickChord=0.01
  sections:
    n  Span   Root_Chord  Tip_Chord  Area   Sweep  Sweep_Location  Dihedral  Twist  Twist_Location  tip airfoil
    1  0.005  0.01        0.01       5e-05  0      0.25            0         0      0.25            as above

Propeller "PropGeom"
  location (X Y Z) -1.5 2.6 1.7, rotation 90 0 -90
  bounding box size 3.79696 4.37569 0.481238
  Design: Diameter=5 NumBlade=3 Beta34=8.76223 UseBeta34Flag=1 Feather=0.00595861 Rotate=0 Precone=0 ReverseFlag=0 FoldAngle=0 PropMode=0 AF=47.8432 CLi=0.69888 Chord=0.111976 Solidity=0.106929 ConstructXoC=0.5 FeatherAxisXoC=0.5 FeatherOffsetXoC=0
  cross sections:
    n  RadiusFrac  shape
    0  0.1         NACA 16-series Chord=0.690128 IdealCl=0.7 ThickChord=0.120315
    1  1           NACA 16-series Chord=0.0909548 IdealCl=0.7 ThickChord=0.120315
  Chord along r/R (PCHIP): 0.1: 0.276051, 0.145: 0.253603, 0.19: 0.21956, 0.235: 0.189502, 0.28: 0.165181, 0.325: 0.145732, 0.37: 0.130052, 0.415: 0.11724, 0.46: 0.10662, 0.505: 0.0976973, 0.55: 0.0901028, 0.595: 0.0835588, 0.64: 0.0778461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
  Twist along r/R (PCHIP): 0.1: 43.7723, 0.145: 33.6294, 0.19: 27.1689, 0.235: 22.7964, 0.28: 19.674, 0.325: 17.3453, 0.37: 15.5472, 0.415: 14.1197, 0.46: 12.9601, 0.505: 12.0002, 0.55: 11.193, 0.595: 10.505, 0.64: 9.91169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
  Sweep along r/R (PCHIP): 0.1: 0, 0.145: -0.0386837, 0.19: -0.074194, 0.235: -0.0918148, 0.28: -0.0986698, 0.325: -0.099912, 0.37: -0.0983301, 0.415: -0.0953793, 0.46: -0.0918231, 0.505: -0.0880656, 0.55: -0.0843216, 0.595: -0.0807035, 0.64: -0.0772697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
  Thick along r/R (PCHIP): 0.1: 0.120315, 0.145: 0.120315, 0.19: 0.120315, 0.235: 0.120315, 0.28: 0.120315, 0.325: 0.120315, 0.37: 0.120315, 0.415: 0.120315, 0.46: 0.120315, 0.505: 0.120315, 0.55: 0.120315, 0.595: 0.120315, 0.64: 0.120315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
  CLI along r/R (PCHIP): 0.1: 0.7, 0.145: 0.7, 0.19: 0.7, 0.235: 0.7, 0.28: 0.7, 0.325: 0.7, 0.37: 0.7, 0.415: 0.7, 0.46: 0.7, 0.505: 0.7, 0.55: 0.7, 0.595: 0.7, 0.64: 0.7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

Propeller "PropGeom"
  location (X Y Z) -1.5 -2.6 1.7, rotation 90 0 -90
  bounding box size 3.79696 4.37569 0.481238
  Design: Diameter=5 NumBlade=3 Beta34=8.76223 UseBeta34Flag=1 Feather=0.00595861 Rotate=0 Precone=0 ReverseFlag=0 FoldAngle=0 PropMode=0 AF=47.8432 CLi=0.69888 Chord=0.111976 Solidity=0.106929 ConstructXoC=0.5 FeatherAxisXoC=0.5 FeatherOffsetXoC=0
  cross sections:
    n  RadiusFrac  shape
    0  0.1         NACA 16-series Chord=0.690128 IdealCl=0.7 ThickChord=0.120315
    1  1           NACA 16-series Chord=0.0909548 IdealCl=0.7 ThickChord=0.120315
  blade curves as in "PropGeom"

Propeller "PropGeom"
  location (X Y Z) 2.5 6 1.7, rotation 90 0 -90
  bounding box size 3.79696 4.37569 0.481238
  Design: Diameter=5 NumBlade=3 Beta34=8.76223 UseBeta34Flag=1 Feather=0.00595861 Rotate=0 Precone=0 ReverseFlag=0 FoldAngle=0 PropMode=0 AF=47.8432 CLi=0.69888 Chord=0.111976 Solidity=0.106929 ConstructXoC=0.5 FeatherAxisXoC=0.5 FeatherOffsetXoC=0
  cross sections:
    n  RadiusFrac  shape
    0  0.1         NACA 16-series Chord=0.690128 IdealCl=0.7 ThickChord=0.120315
    1  1           NACA 16-series Chord=0.0909548 IdealCl=0.7 ThickChord=0.120315
  blade curves as in "PropGeom"

Propeller "PropGeom"
  location (X Y Z) 2.5 -6 1.7, rotation 90 0 -90
  bounding box size 3.79696 4.37569 0.481238
  Design: Diameter=5 NumBlade=3 Beta34=8.76223 UseBeta34Flag=1 Feather=0.00595861 Rotate=0 Precone=0 ReverseFlag=0 FoldAngle=0 PropMode=0 AF=47.8432 CLi=0.69888 Chord=0.111976 Solidity=0.106929 ConstructXoC=0.5 FeatherAxisXoC=0.5 FeatherOffsetXoC=0
  cross sections:
    n  RadiusFrac  shape
    0  0.1         NACA 16-series Chord=0.690128 IdealCl=0.7 ThickChord=0.120315
    1  1           NACA 16-series Chord=0.0909548 IdealCl=0.7 ThickChord=0.120315
  blade curves as in "PropGeom"

Propeller "PropGeom"
  location (X Y Z) 6.5 2.6 1.7, rotation 90 0 -90
  bounding box size 3.79696 4.37569 0.481238
  Design: Diameter=5 NumBlade=3 Beta34=8.76223 UseBeta34Flag=1 Feather=0.00595861 Rotate=0 Precone=0 ReverseFlag=0 FoldAngle=0 PropMode=0 AF=47.8432 CLi=0.69888 Chord=0.111976 Solidity=0.106929 ConstructXoC=0.5 FeatherAxisXoC=0.5 FeatherOffsetXoC=0
  cross sections:
    n  RadiusFrac  shape
    0  0.1         NACA 16-series Chord=0.690128 IdealCl=0.7 ThickChord=0.120315
    1  1           NACA 16-series Chord=0.0909548 IdealCl=0.7 ThickChord=0.120315
  blade curves as in "PropGeom"

Propeller "PropGeom"
  location (X Y Z) 6.5 -2.6 1.7, rotation 90 0 -90
  bounding box size 3.79696 4.37569 0.481238
  Design: Diameter=5 NumBlade=3 Beta34=8.76223 UseBeta34Flag=1 Feather=0.00595861 Rotate=0 Precone=0 ReverseFlag=0 FoldAngle=0 PropMode=0 AF=47.8432 CLi=0.69888 Chord=0.111976 Solidity=0.106929 ConstructXoC=0.5 FeatherAxisXoC=0.5 FeatherOffsetXoC=0
  cross sections:
    n  RadiusFrac  shape
    0  0.1         NACA 16-series Chord=0.690128 IdealCl=0.7 ThickChord=0.120315
    1  1           NACA 16-series Chord=0.0909548 IdealCl=0.7 ThickChord=0.120315
  blade curves as in "PropGeom"

BodyOfRevolution "engine_nacelle_1"
  location (X Y Z) -1.5 2.6 1.9, rotation 0 90 0
  bounding box size 0.9 0.9 0.5
  Design: A0=0.384845 Ae=0.384845 Amin=0.19635 AminW=0.25 Angle=0 Diameter=0.7 Mode=0
  profile: super ellipse Super_Height=0.2 Super_M=2 Super_MaxWidthLoc=0 Super_N=1 Super_Width=0.5

BodyOfRevolution "engine_nacelle_2"
  location (X Y Z) -1.5 -2.6 1.9, rotation 0 90 0
  bounding box size 0.9 0.9 0.5
  Design: A0=0.384845 Ae=0.384845 Amin=0.19635 AminW=0.25 Angle=0 Diameter=0.7 Mode=0
  profile: super ellipse Super_Height=0.2 Super_M=2 Super_MaxWidthLoc=0 Super_N=1 Super_Width=0.5

BodyOfRevolution "engine_nacelle_3"
  location (X Y Z) 2.5 6 1.9, rotation 0 90 0
  bounding box size 0.9 0.9 0.5
  Design: A0=0.384845 Ae=0.384845 Amin=0.19635 AminW=0.25 Angle=0 Diameter=0.7 Mode=0
  profile: super ellipse Super_Height=0.2 Super_M=2 Super_MaxWidthLoc=0 Super_N=1 Super_Width=0.5

BodyOfRevolution "engine_nacelle_4"
  location (X Y Z) 2.5 -6 1.9, rotation 0 90 0
  bounding box size 0.9 0.9 0.5
  Design: A0=0.384845 Ae=0.384845 Amin=0.19635 AminW=0.25 Angle=0 Diameter=0.7 Mode=0
  profile: super ellipse Super_Height=0.2 Super_M=2 Super_MaxWidthLoc=0 Super_N=1 Super_Width=0.5

BodyOfRevolution "engine_nacelle_5"
  location (X Y Z) 6.5 2.6 1.9, rotation 0 90 0
  bounding box size 0.9 0.9 0.5
  Design: A0=0.384845 Ae=0.384845 Amin=0.19635 AminW=0.25 Angle=0 Diameter=0.7 Mode=0
  profile: super ellipse Super_Height=0.2 Super_M=2 Super_MaxWidthLoc=0 Super_N=1 Super_Width=0.5

BodyOfRevolution "engine_nacelle_6"
  location (X Y Z) 6.5 -2.6 1.9, rotation 0 90 0
  bounding box size 0.9 0.9 0.5
  Design: A0=0.384845 Ae=0.384845 Amin=0.19635 AminW=0.25 Angle=0 Diameter=0.7 Mode=0
  profile: super ellipse Super_Height=0.2 Super_M=2 Super_MaxWidthLoc=0 Super_N=1 Super_Width=0.5

BodyOfRevolution "cowling_1"
  location (X Y Z) -1.5 2.6 1.8, rotation 0 90 0
  bounding box size 5.25 5.25 0.4
  Design: A0=20.8307 Ae=20.8307 Amin=20.0296 AminW=0.25 Angle=0 Diameter=5.15 Mode=0
  profile: super ellipse Super_Height=0.1 Super_M=2 Super_MaxWidthLoc=0 Super_N=1 Super_Width=0.4

BodyOfRevolution "cowling_2"
  location (X Y Z) -1.5 -2.6 1.8, rotation 0 90 0
  bounding box size 5.25 5.25 0.4
  Design: A0=20.8307 Ae=20.8307 Amin=20.0296 AminW=0.25 Angle=0 Diameter=5.15 Mode=0
  profile: super ellipse Super_Height=0.1 Super_M=2 Super_MaxWidthLoc=0 Super_N=1 Super_Width=0.4

BodyOfRevolution "cowling_3"
  location (X Y Z) 2.5 6 1.8, rotation 0 90 0
  bounding box size 5.25 5.25 0.4
  Design: A0=20.8307 Ae=20.8307 Amin=20.0296 AminW=0.25 Angle=0 Diameter=5.15 Mode=0
  profile: super ellipse Super_Height=0.1 Super_M=2 Super_MaxWidthLoc=0 Super_N=1 Super_Width=0.4

BodyOfRevolution "cowling_4"
  location (X Y Z) 2.5 -6 1.8, rotation 0 90 0
  bounding box size 5.25 5.25 0.4
  Design: A0=20.8307 Ae=20.8307 Amin=20.0296 AminW=0.25 Angle=0 Diameter=5.15 Mode=0
  profile: super ellipse Super_Height=0.1 Super_M=2 Super_MaxWidthLoc=0 Super_N=1 Super_Width=0.4

BodyOfRevolution "cowling_5"
  location (X Y Z) 6.5 2.6 1.8, rotation 0 90 0
  bounding box size 5.25 5.25 0.4
  Design: A0=20.8307 Ae=20.8307 Amin=20.0296 AminW=0.25 Angle=0 Diameter=5.15 Mode=0
  profile: super ellipse Super_Height=0.1 Super_M=2 Super_MaxWidthLoc=0 Super_N=1 Super_Width=0.4

BodyOfRevolution "cowling_6"
  location (X Y Z) 6.5 -2.6 1.8, rotation 0 90 0
  bounding box size 5.25 5.25 0.4
  Design: A0=20.8307 Ae=20.8307 Amin=20.0296 AminW=0.25 Angle=0 Diameter=5.15 Mode=0
  profile: super ellipse Super_Height=0.1 Super_M=2 Super_MaxWidthLoc=0 Super_N=1 Super_Width=0.4

Fuselage "fuselage"
  location (X Y Z) 0 0 0, rotation 0 0 0
  bounding box size 5.01101 1.85209 1.49748
  Design: Length=5
  cross sections:
    n  XLocPercent  YLocPercent  ZLocPercent  shape
    0  0            0            0            point
    1  0.05         0            0.042825     ellipse Ellipse_Height=0.737 Ellipse_Width=1.2
    2  0.206275     0            0.071        ellipse Ellipse_Height=1.4 Ellipse_Width=1.8
    3  0.8355       0            0.089        as above
    4  0.92501      0            0.1159       ellipse Ellipse_Height=0.9444 Ellipse_Width=1.2
    5  1            0            0.158        ellipse Ellipse_Height=0.1 Ellipse_Width=0.1
    6  1            0            0.158        point
