OpenVSP model (file version 5), 37 components.
Geometry view with OpenVSP parameter names; values to 6 digits, angles in degrees, lengths in the model's unit.
Overall bounding box: X_Min=-0.715715 X_Len=7.95072 Y_Min=-7.7289 Y_Len=15.4588 Z_Min=-0.460686 Z_Len=2.7261

Wing "main_wing"
  location (X Y Z) 1.5 0 1.1, rotation 0 0 0
  symmetric about XZ
  bounding box size 1.7918 14.1779 0.606645
  totals: TotalSpan=14.1717 TotalProjectedSpan=14.11 TotalChord=1.08892 TotalArea=16.1937 TotalAR=12.2944
  root: chord 1.796, twist 4, NACA 4-series Camber=0 CamberLoc=0.2 ThickChord=0.166438
  sections:
    n  Span      Root_Chord  Tip_Chord  Area      Sweep  Sweep_Location  Dihedral  Twist  Twist_Location  tip airfoil
    1  1.73906   1.796       1.19254    2.59862   3.18   0.25            0         0      0.25            NACA 4-series Camber=0 CamberLoc=0.2 ThickChord=0.18
    2  4.9474    1.19254     0.914      5.21095   0      0.25            3         1      0.25            NACA 4-series Camber=0 CamberLoc=0.2 ThickChord=0.16
    3  0.399414  0.914       0.524432   0.287265  26.45  0.25            20        0      0.25            as above

Wing "horizontal_tail"
  location (X Y Z) 5.7 0 0.27, rotation 0 0 0
  symmetric about XZ
  bounding box size 1.2997 2.58157 0.991235
  totals: TotalSpan=3.07635 TotalProjectedSpan=2.52 TotalChord=0.8097 TotalArea=2.49092 TotalAR=2.54942
  root: chord 0.9494, twist 0, NACA 4-series Camber=0 CamberLoc=0.2 ThickChord=0.12
  sections:
    n  Span     Root_Chord  Tip_Chord  Area     Sweep  Sweep_Location  Dihedral  Twist  Twist_Location  tip airfoil
    1  1.53818  0.9494      0.67       1.24546  20     0.25            35        0      0.25            as above

Propeller "PropGeom"
  location (X Y Z) 7.126 1.3 1.25, rotation 0 0 0
  bounding box size 0.168948 1.76369 2.03064
  Design: Diameter=2.3 NumBlade=3 Beta34=36.2336 UseBeta34Flag=1 Feather=0.0162232 Rotate=0 Precone=0 ReverseFlag=0 FoldAngle=0 PropMode=0 AF=108.35 CLi=0.69888 Chord=0.143711 Solidity=0.137234 ConstructXoC=0.5 FeatherAxisXoC=0.5 FeatherOffsetXoC=0
  cross sections:
    n  RadiusFrac  shape
    0  0.1         NACA 16-series Chord=0.0270497 IdealCl=0.7 ThickChord=0.120315
    1  1           NACA 16-series Chord=0.0886208 IdealCl=0.7 ThickChord=0.120315
  Chord along r/R (PCHIP): 0.1: 0.0235215, 0.145: 0.0461474, 0.19: 0.0724435, 0.235: 0.0995794, 0.28: 0.125272, 0.325: 0.147933, 0.37: 0.166572, 0.415: 0.180848, 0.46: 0.190783, 0.505: 0.19663, 0.55: 0.198745, 0.595: 0.197504, 0.64: 0.193243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
  Twist along r/R (PCHIP): 0.1: 80.6346, 0.145: 76.5496, 0.19: 71.7843, 0.235: 66.5869, 0.28: 62.357, 0.325: 59.493, 0.37: 56.0423, 0.415: 52.8682, 0.46: 49.9559, 0.505: 47.2876, 0.55: 44.8442, 0.595: 42.6061, 0.64: 40.5545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
  Sweep along r/R (PCHIP): 0.1: 0, 0.145: 0.0389904, 0.19: 0.0642823, 0.235: 0.0807367, 0.28: 0.0905999, 0.325: 0.0954103, 0.37: 0.0963563, 0.415: 0.0944927, 0.46: 0.090654, 0.505: 0.0854883, 0.55: 0.0794792, 0.595: 0.072972, 0.64: 0.0662004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
  Thick along r/R (PCHIP): 0.1: 0.120315, 0.145: 0.120315, 0.19: 0.120315, 0.235: 0.120315, 0.28: 0.120315, 0.325: 0.120315, 0.37: 0.120315, 0.415: 0.120315, 0.46: 0.120315, 0.505: 0.120315, 0.55: 0.120315, 0.595: 0.120315, 0.64: 0.120315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
  CLI along r/R (PCHIP): 0.1: 0.7, 0.145: 0.7, 0.19: 0.7, 0.235: 0.7, 0.28: 0.7, 0.325: 0.7, 0.37: 0.7, 0.415: 0.7, 0.46: 0.7, 0.505: 0.7, 0.55: 0.7, 0.595: 0.7, 0.64: 0.7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

Propeller "PropGeom"
  location (X Y Z) 7.126 -1.3 1.25, rotation 0 0 0
  bounding box size 0.168948 1.76369 2.03064
  Design: Diameter=2.3 NumBlade=3 Beta34=36.2336 UseBeta34Flag=1 Feather=0.0162232 Rotate=0 Precone=0 ReverseFlag=0 FoldAngle=0 PropMode=0 AF=108.35 CLi=0.69888 Chord=0.143711 Solidity=0.137234 ConstructXoC=0.5 FeatherAxisXoC=0.5 FeatherOffsetXoC=0
  cross sections:
    n  RadiusFrac  shape
    0  0.1         NACA 16-series Chord=0.0270497 IdealCl=0.7 ThickChord=0.120315
    1  1           NACA 16-series Chord=0.0886208 IdealCl=0.7 ThickChord=0.120315
  blade curves as in "PropGeom"

Propeller "PropGeom"
  location (X Y Z) 0.226 1.413 1.1, rotation 90 0 -90
  bounding box size 2.09388 2.19883 0.202136
  Design: Diameter=2.3 NumBlade=5 Beta34=8.53857 UseBeta34Flag=1 Feather=0.00582042 Rotate=0 Precone=0 ReverseFlag=0 FoldAngle=0 PropMode=0 AF=35.8953 CLi=0.79872 Chord=0.0847986 Solidity=0.134961 ConstructXoC=0.5 FeatherAxisXoC=0.5 FeatherOffsetXoC=0
  cross sections:
    n  RadiusFrac  shape
    0  0.1         NACA 16-series Chord=0.295654 IdealCl=0.8 ThickChord=0.120315
    1  1           NACA 16-series Chord=0.0361177 IdealCl=0.8 ThickChord=0.120315
  Chord along r/R (PCHIP): 0.1: 0.25709, 0.145: 0.207717, 0.19: 0.169774, 0.235: 0.14222, 0.28: 0.121842, 0.325: 0.106336, 0.37: 0.0942112, 0.415: 0.0845029, 0.46: 0.0765702, 0.505: 0.0699754, 0.55: 0.0644113, 0.595: 0.0596568, 0.64: 0.0555486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
  Twist along r/R (PCHIP): 0.1: 42.6408, 0.145: 32.4255, 0.19: 26.0114, 0.235: 21.7567, 0.28: 18.7624, 0.325: 16.5513, 0.37: 14.856, 0.415: 13.5167, 0.46: 12.4329, 0.505: 11.5385, 0.55: 10.7881, 0.595: 10.1497, 0.64: 9.60016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
  Sweep along r/R (PCHIP): 0.1: 0, 0.145: -0.0849215, 0.19: -0.114388, 0.235: -0.121599, 0.28: -0.120175, 0.325: -0.115449, 0.37: -0.109612, 0.415: -0.103596, 0.46: -0.0977958, 0.505: -0.0923676, 0.55: -0.0873585, 0.595: -0.0827658, 0.64: -0.0785652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
  Thick along r/R (PCHIP): 0.1: 0.120315, 0.145: 0.120315, 0.19: 0.120315, 0.235: 0.120315, 0.28: 0.120315, 0.325: 0.120315, 0.37: 0.120315, 0.415: 0.120315, 0.46: 0.120315, 0.505: 0.120315, 0.55: 0.120315, 0.595: 0.120315, 0.64: 0.120315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
  CLI along r/R (PCHIP): 0.1: 0.8, 0.145: 0.8, 0.19: 0.8, 0.235: 0.8, 0.28: 0.8, 0.325: 0.8, 0.37: 0.8, 0.415: 0.8, 0.46: 0.8, 0.505: 0.8, 0.55: 0.8, 0.595: 0.8, 0.64: 0.8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

Propeller "PropGeom"
  location (X Y Z) 0.226 -1.413 1.1, rotation 90 0 -90
  bounding box size 2.09388 2.19883 0.202136
  Design: Diameter=2.3 NumBlade=5 Beta34=8.53857 UseBeta34Flag=1 Feather=0.00582042 Rotate=0 Precone=0 ReverseFlag=0 FoldAngle=0 PropMode=0 AF=35.8953 CLi=0.79872 Chord=0.0847986 Solidity=0.134961 ConstructXoC=0.5 FeatherAxisXoC=0.5 FeatherOffsetXoC=0
  cross sections:
    n  RadiusFrac  shape
    0  0.1         NACA 16-series Chord=0.295654 IdealCl=0.8 ThickChord=0.120315
    1  1           NACA 16-series Chord=0.0361177 IdealCl=0.8 ThickChord=0.120315
  blade curves as in "PropGeom"

Propeller "PropGeom"
  location (X Y Z) 4.63 1.413 1.1, rotation 90 0 -90
  bounding box size 2.09388 2.19883 0.202136
  Design: Diameter=2.3 NumBlade=5 Beta34=8.53857 UseBeta34Flag=1 Feather=0.00582042 Rotate=0 Precone=0 ReverseFlag=0 FoldAngle=0 PropMode=0 AF=35.8953 CLi=0.79872 Chord=0.0847986 Solidity=0.134961 ConstructXoC=0.5 FeatherAxisXoC=0.5 FeatherOffsetXoC=0
  cross sections:
    n  RadiusFrac  shape
    0  0.1         NACA 16-series Chord=0.295654 IdealCl=0.8 ThickChord=0.120315
    1  1           NACA 16-series Chord=0.0361177 IdealCl=0.8 ThickChord=0.120315
  blade curves as in "PropGeom"

Propeller "PropGeom"
  location (X Y Z) 4.63 -1.413 1.1, rotation 90 0 -90
  bounding box size 2.09388 2.19883 0.202136
  Design: Diameter=2.3 NumBlade=5 Beta34=8.53857 UseBeta34Flag=1 Feather=0.00582042 Rotate=0 Precone=0 ReverseFlag=0 FoldAngle=0 PropMode=0 AF=35.8953 CLi=0.79872 Chord=0.0847986 Solidity=0.134961 ConstructXoC=0.5 FeatherAxisXoC=0.5 FeatherOffsetXoC=0
  cross sections:
    n  RadiusFrac  shape
    0  0.1         NACA 16-series Chord=0.295654 IdealCl=0.8 ThickChord=0.120315
    1  1           NACA 16-series Chord=0.0361177 IdealCl=0.8 ThickChord=0.120315
  blade curves as in "PropGeom"

Propeller "PropGeom"
  location (X Y Z) 0.409 4.022 1.2, rotation 90 0 -90
  bounding box size 2.09388 2.19883 0.202136
  Design: Diameter=2.3 NumBlade=5 Beta34=8.53857 UseBeta34Flag=1 Feather=0.00582042 Rotate=0 Precone=0 ReverseFlag=0 FoldAngle=0 PropMode=0 AF=35.8953 CLi=0.79872 Chord=0.0847986 Solidity=0.134961 ConstructXoC=0.5 FeatherAxisXoC=0.5 FeatherOffsetXoC=0
  cross sections:
    n  RadiusFrac  shape
    0  0.1         NACA 16-series Chord=0.295654 IdealCl=0.8 ThickChord=0.120315
    1  1           NACA 16-series Chord=0.0361177 IdealCl=0.8 ThickChord=0.120315
  blade curves as in "PropGeom"

Propeller "PropGeom"
  location (X Y Z) 0.409 -4.022 1.2, rotation 90 0 -90
  bounding box size 2.09388 2.19883 0.202136
  Design: Diameter=2.3 NumBlade=5 Beta34=8.53857 UseBeta34Flag=1 Feather=0.00582042 Rotate=0 Precone=0 ReverseFlag=0 FoldAngle=0 PropMode=0 AF=35.8953 CLi=0.79872 Chord=0.0847986 Solidity=0.134961 ConstructXoC=0.5 FeatherAxisXoC=0.5 FeatherOffsetXoC=0
  cross sections:
    n  RadiusFrac  shape
    0  0.1         NACA 16-series Chord=0.295654 IdealCl=0.8 ThickChord=0.120315
    1  1           NACA 16-series Chord=0.0361177 IdealCl=0.8 ThickChord=0.120315
  blade curves as in "PropGeom"

Propeller "PropGeom"
  location (X Y Z) 4.413 4.022 1.2, rotation 90 0 -90
  bounding box size 2.09388 2.19883 0.202136
  Design: Diameter=2.3 NumBlade=5 Beta34=8.53857 UseBeta34Flag=1 Feather=0.00582042 Rotate=0 Precone=0 ReverseFlag=0 FoldAngle=0 PropMode=0 AF=35.8953 CLi=0.79872 Chord=0.0847986 Solidity=0.134961 ConstructXoC=0.5 FeatherAxisXoC=0.5 FeatherOffsetXoC=0
  cross sections:
    n  RadiusFrac  shape
    0  0.1         NACA 16-series Chord=0.295654 IdealCl=0.8 ThickChord=0.120315
    1  1           NACA 16-series Chord=0.0361177 IdealCl=0.8 ThickChord=0.120315
  blade curves as in "PropGeom"

Propeller "PropGeom"
  location (X Y Z) 4.413 -4.022 1.2, rotation 90 0 -90
  bounding box size 2.09388 2.19883 0.202136
  Design: Diameter=2.3 NumBlade=5 Beta34=8.53857 UseBeta34Flag=1 Feather=0.00582042 Rotate=0 Precone=0 ReverseFlag=0 FoldAngle=0 PropMode=0 AF=35.8953 CLi=0.79872 Chord=0.0847986 Solidity=0.134961 ConstructXoC=0.5 FeatherAxisXoC=0.5 FeatherOffsetXoC=0
  cross sections:
    n  RadiusFrac  shape
    0  0.1         NACA 16-series Chord=0.295654 IdealCl=0.8 ThickChord=0.120315
    1  1           NACA 16-series Chord=0.0361177 IdealCl=0.8 ThickChord=0.120315
  blade curves as in "PropGeom"

Propeller "PropGeom"
  location (X Y Z) 0.409 6.63 1.3, rotation 90 0 -90
  bounding box size 2.09388 2.19883 0.202136
  Design: Diameter=2.3 NumBlade=5 Beta34=8.53857 UseBeta34Flag=1 Feather=0.00582042 Rotate=0 Precone=0 ReverseFlag=0 FoldAngle=0 PropMode=0 AF=35.8953 CLi=0.79872 Chord=0.0847986 Solidity=0.134961 ConstructXoC=0.5 FeatherAxisXoC=0.5 FeatherOffsetXoC=0
  cross sections:
    n  RadiusFrac  shape
    0  0.1         NACA 16-series Chord=0.295654 IdealCl=0.8 ThickChord=0.120315
    1  1           NACA 16-series Chord=0.0361177 IdealCl=0.8 ThickChord=0.120315
  blade curves as in "PropGeom"

Propeller "PropGeom"
  location (X Y Z) 0.409 -6.63 1.3, rotation 90 0 -90
  bounding box size 2.09388 2.19883 0.202136
  Design: Diameter=2.3 NumBlade=5 Beta34=8.53857 UseBeta34Flag=1 Feather=0.00582042 Rotate=0 Precone=0 ReverseFlag=0 FoldAngle=0 PropMode=0 AF=35.8953 CLi=0.79872 Chord=0.0847986 Solidity=0.134961 ConstructXoC=0.5 FeatherAxisXoC=0.5 FeatherOffsetXoC=0
  cross sections:
    n  RadiusFrac  shape
    0  0.1         NACA 16-series Chord=0.295654 IdealCl=0.8 ThickChord=0.120315
    1  1           NACA 16-series Chord=0.0361177 IdealCl=0.8 ThickChord=0.120315
  blade curves as in "PropGeom"

Propeller "PropGeom"
  location (X Y Z) 4.413 6.63 1.3, rotation 90 0 -90
  bounding box size 2.09388 2.19883 0.202136
  Design: Diameter=2.3 NumBlade=5 Beta34=8.53857 UseBeta34Flag=1 Feather=0.00582042 Rotate=0 Precone=0 ReverseFlag=0 FoldAngle=0 PropMode=0 AF=35.8953 CLi=0.79872 Chord=0.0847986 Solidity=0.134961 ConstructXoC=0.5 FeatherAxisXoC=0.5 FeatherOffsetXoC=0
  cross sections:
    n  RadiusFrac  shape
    0  0.1         NACA 16-series Chord=0.295654 IdealCl=0.8 ThickChord=0.120315
    1  1           NACA 16-series Chord=0.0361177 IdealCl=0.8 ThickChord=0.120315
  blade curves as in "PropGeom"

Propeller "PropGeom"
  location (X Y Z) 4.413 -6.63 1.3, rotation 90 0 -90
  bounding box size 2.09388 2.19883 0.202136
  Design: Diameter=2.3 NumBlade=5 Beta34=8.53857 UseBeta34Flag=1 Feather=0.00582042 Rotate=0 Precone=0 ReverseFlag=0 FoldAngle=0 PropMode=0 AF=35.8953 CLi=0.79872 Chord=0.0847986 Solidity=0.134961 ConstructXoC=0.5 FeatherAxisXoC=0.5 FeatherOffsetXoC=0
  cross sections:
    n  RadiusFrac  shape
    0  0.1         NACA 16-series Chord=0.295654 IdealCl=0.8 ThickChord=0.120315
    1  1           NACA 16-series Chord=0.0361177 IdealCl=0.8 ThickChord=0.120315
  blade curves as in "PropGeom"

Stack "rotor_nacelle_1"
  location (X Y Z) 0.226 1.413 1.3, rotation 0 90 0
  bounding box size 0.3 0.3 0.45
  cross sections:
    n  XDelta  YDelta  ZDelta  shape
    0  0       0       0       point
    1  0.1125  0       0       ellipse Ellipse_Height=0.25 Ellipse_Width=0.25
    2  0.1125  0       0       ellipse Ellipse_Height=0.3 Ellipse_Width=0.3
    3  0.1125  0       0       ellipse Ellipse_Height=0.25 Ellipse_Width=0.25
    4  0.1125  0       0       point

Stack "rotor_nacelle_2"
  location (X Y Z) 0.226 -1.413 1.3, rotation 0 90 0
  bounding box size 0.3 0.3 0.45
  cross sections:
    n  XDelta  YDelta  ZDelta  shape
    0  0       0       0       point
    1  0.1125  0       0       ellipse Ellipse_Height=0.25 Ellipse_Width=0.25
    2  0.1125  0       0       ellipse Ellipse_Height=0.3 Ellipse_Width=0.3
    3  0.1125  0       0       ellipse Ellipse_Height=0.25 Ellipse_Width=0.25
    4  0.1125  0       0       point

Stack "rotor_nacelle_3"
  location (X Y Z) 4.63 1.413 1.3, rotation 0 90 0
  bounding box size 0.3 0.3 0.45
  cross sections:
    n  XDelta  YDelta  ZDelta  shape
    0  0       0       0       point
    1  0.1125  0       0       ellipse Ellipse_Height=0.25 Ellipse_Width=0.25
    2  0.1125  0       0       ellipse Ellipse_Height=0.3 Ellipse_Width=0.3
    3  0.1125  0       0       ellipse Ellipse_Height=0.25 Ellipse_Width=0.25
    4  0.1125  0       0       point

Stack "rotor_nacelle_4"
  location (X Y Z) 4.63 -1.413 1.3, rotation 0 90 0
  bounding box size 0.3 0.3 0.45
  cross sections:
    n  XDelta  YDelta  ZDelta  shape
    0  0       0       0       point
    1  0.1125  0       0       ellipse Ellipse_Height=0.25 Ellipse_Width=0.25
    2  0.1125  0       0       ellipse Ellipse_Height=0.3 Ellipse_Width=0.3
    3  0.1125  0       0       ellipse Ellipse_Height=0.25 Ellipse_Width=0.25
    4  0.1125  0       0       point

Stack "rotor_nacelle_5"
  location (X Y Z) 0.409 4.022 1.4, rotation 0 90 0
  bounding box size 0.3 0.3 0.45
  cross sections:
    n  XDelta  YDelta  ZDelta  shape
    0  0       0       0       point
    1  0.1125  0       0       ellipse Ellipse_Height=0.25 Ellipse_Width=0.25
    2  0.1125  0       0       ellipse Ellipse_Height=0.3 Ellipse_Width=0.3
    3  0.1125  0       0       ellipse Ellipse_Height=0.25 Ellipse_Width=0.25
    4  0.1125  0       0       point

Stack "rotor_nacelle_6"
  location (X Y Z) 0.409 -4.022 1.4, rotation 0 90 0
  bounding box size 0.3 0.3 0.45
  cross sections:
    n  XDelta  YDelta  ZDelta  shape
    0  0       0       0       point
    1  0.1125  0       0       ellipse Ellipse_Height=0.25 Ellipse_Width=0.25
    2  0.1125  0       0       ellipse Ellipse_Height=0.3 Ellipse_Width=0.3
    3  0.1125  0       0       ellipse Ellipse_Height=0.25 Ellipse_Width=0.25
    4  0.1125  0       0       point

Stack "rotor_nacelle_7"
  location (X Y Z) 4.413 4.022 1.4, rotation 0 90 0
  bounding box size 0.3 0.3 0.45
  cross sections:
    n  XDelta  YDelta  ZDelta  shape
    0  0       0       0       point
    1  0.1125  0       0       ellipse Ellipse_Height=0.25 Ellipse_Width=0.25
    2  0.1125  0       0       ellipse Ellipse_Height=0.3 Ellipse_Width=0.3
    3  0.1125  0       0       ellipse Ellipse_Height=0.25 Ellipse_Width=0.25
    4  0.1125  0       0       point

Stack "rotor_nacelle_8"
  location (X Y Z) 4.413 -4.022 1.4, rotation 0 90 0
  bounding box size 0.3 0.3 0.45
  cross sections:
    n  XDelta  YDelta  ZDelta  shape
    0  0       0       0       point
    1  0.1125  0       0       ellipse Ellipse_Height=0.25 Ellipse_Width=0.25
    2  0.1125  0       0       ellipse Ellipse_Height=0.3 Ellipse_Width=0.3
    3  0.1125  0       0       ellipse Ellipse_Height=0.25 Ellipse_Width=0.25
    4  0.1125  0       0       point

Stack "rotor_nacelle_9"
  location (X Y Z) 0.409 6.63 1.5, rotation 0 90 0
  bounding box size 0.3 0.3 0.45
  cross sections:
    n  XDelta  YDelta  ZDelta  shape
    0  0       0       0       point
    1  0.1125  0       0       ellipse Ellipse_Height=0.25 Ellipse_Width=0.25
    2  0.1125  0       0       ellipse Ellipse_Height=0.3 Ellipse_Width=0.3
    3  0.1125  0       0       ellipse Ellipse_Height=0.25 Ellipse_Width=0.25
    4  0.1125  0       0       point

Stack "rotor_nacelle_10"
  location (X Y Z) 0.409 -6.63 1.5, rotation 0 90 0
  bounding box size 0.3 0.3 0.45
  cross sections:
    n  XDelta  YDelta  ZDelta  shape
    0  0       0       0       point
    1  0.1125  0       0       ellipse Ellipse_Height=0.25 Ellipse_Width=0.25
    2  0.1125  0       0       ellipse Ellipse_Height=0.3 Ellipse_Width=0.3
    3  0.1125  0       0       ellipse Ellipse_Height=0.25 Ellipse_Width=0.25
    4  0.1125  0       0       point

Stack "rotor_nacelle_11"
  location (X Y Z) 4.413 6.63 1.5, rotation 0 90 0
  bounding box size 0.3 0.3 0.45
  cross sections:
    n  XDelta  YDelta  ZDelta  shape
    0  0       0       0       point
    1  0.1125  0       0       ellipse Ellipse_Height=0.25 Ellipse_Width=0.25
    2  0.1125  0       0       ellipse Ellipse_Height=0.3 Ellipse_Width=0.3
    3  0.1125  0       0       ellipse Ellipse_Height=0.25 Ellipse_Width=0.25
    4  0.1125  0       0       point

Stack "rotor_nacelle_12"
  location (X Y Z) 4.413 -6.63 1.5, rotation 0 90 0
  bounding box size 0.3 0.3 0.45
  cross sections:
    n  XDelta  YDelta  ZDelta  shape
    0  0       0       0       point
    1  0.1125  0       0       ellipse Ellipse_Height=0.25 Ellipse_Width=0.25
    2  0.1125  0       0       ellipse Ellipse_Height=0.3 Ellipse_Width=0.3
    3  0.1125  0       0       ellipse Ellipse_Height=0.25 Ellipse_Width=0.25
    4  0.1125  0       0       point

Stack "propeller_nacelle_1"
  location (X Y Z) 6.235 1.3 1.25, rotation 0 0 0
  bounding box size 1 0.4 0.4
  cross sections:
    n  XDelta  YDelta  ZDelta  shape
    0  0       0       0       point
    1  0.1     0       0       ellipse Ellipse_Height=0.3 Ellipse_Width=0.3
    2  0.15    0       0       ellipse Ellipse_Height=0.35 Ellipse_Width=0.35
    3  0.25    0       0       ellipse Ellipse_Height=0.4 Ellipse_Width=0.4
    4  0.4     0       0       ellipse Ellipse_Height=0.3 Ellipse_Width=0.3
    5  0.1     0       0       point

Stack "propeller_nacelle_2"
  location (X Y Z) 6.235 -1.3 1.25, rotation 0 0 0
  bounding box size 1 0.4 0.4
  cross sections:
    n  XDelta  YDelta  ZDelta  shape
    0  0       0       0       point
    1  0.1     0       0       ellipse Ellipse_Height=0.3 Ellipse_Width=0.3
    2  0.15    0       0       ellipse Ellipse_Height=0.35 Ellipse_Width=0.35
    3  0.25    0       0       ellipse Ellipse_Height=0.4 Ellipse_Width=0.4
    4  0.4     0       0       ellipse Ellipse_Height=0.3 Ellipse_Width=0.3
    5  0.1     0       0       point

Fuselage "fuselage"
  location (X Y Z) 0 0 0, rotation 0 0 0
  bounding box size 6.46 1.28131 1.62406
  Design: Length=6.46
  cross sections:
    n  XLocPercent  YLocPercent  ZLocPercent  shape
    0  0            0            0            point
    1  0.026        0            0.00849      ellipse Ellipse_Height=0.481 Ellipse_Width=0.553
    2  0.074        0            0.02874      ellipse Ellipse_Height=1 Ellipse_Width=0.912
    3  0.161        0            0.04348      ellipse Ellipse_Height=1.41 Ellipse_Width=1.174
    4  0.284        0            0.05435      ellipse Ellipse_Height=1.62 Ellipse_Width=1.276
    5  0.531        0            0.04669      ellipse Ellipse_Height=1.409 Ellipse_Width=1.121
    6  0.651        0            0.03875      ellipse Ellipse_Height=1.11 Ellipse_Width=0.833
    7  0.773        0            0.03612      ellipse Ellipse_Height=0.78 Ellipse_Width=0.512
    8  1            0            0.03234      ellipse Ellipse_Height=0.195 Ellipse_Width=0.13
    9  1            0            0.03234      point

Fuselage "boom_1r"
  location (X Y Z) 0.227 1.413 0.9, rotation 0 0 0
  bounding box size 4.55 0.151176 0.151176
  Design: Length=4.55
  cross sections:
    n  XLocPercent  YLocPercent  ZLocPercent  shape
    0  0            0            0            point
    1  0.03         0            0            ellipse Ellipse_Height=0.15 Ellipse_Width=0.15
    2  0.97         0            0            as above
    3  1            0            0            ellipse Ellipse_Height=0.05 Ellipse_Width=0.05
    4  1            0            0            point

Fuselage "boom_1l"
  location (X Y Z) 0.227 -1.413 0.9, rotation 0 0 0
  bounding box size 4.55 0.151176 0.151176
  Design: Length=4.55
  cross sections:
    n  XLocPercent  YLocPercent  ZLocPercent  shape
    0  0            0            0            point
    1  0.03         0            0            ellipse Ellipse_Height=0.15 Ellipse_Width=0.15
    2  0.97         0            0            as above
    3  1            0            0            ellipse Ellipse_Height=0.05 Ellipse_Width=0.05
    4  1            0            0            point

Fuselage "boom_2r"
  location (X Y Z) 0.409 4.022 1, rotation 0 0 0
  bounding box size 4.16 0.151203 0.151203
  Design: Length=4.16
  cross sections:
    n  XLocPercent  YLocPercent  ZLocPercent  shape
    0  0            0            0            point
    1  0.03         0            0            ellipse Ellipse_Height=0.15 Ellipse_Width=0.15
    2  0.97         0            0            as above
    3  1            0            0            ellipse Ellipse_Height=0.05 Ellipse_Width=0.05
    4  1            0            0            point

Fuselage "boom_3r"
  location (X Y Z) 0.409 6.631 1.2, rotation 0 0 0
  bounding box size 4.16 0.151203 0.151203
  Design: Length=4.16
  cross sections:
    n  XLocPercent  YLocPercent  ZLocPercent  shape
    0  0            0            0            point
    1  0.03         0            0            ellipse Ellipse_Height=0.15 Ellipse_Width=0.15
    2  0.97         0            0            as above
    3  1            0            0            ellipse Ellipse_Height=0.05 Ellipse_Width=0.05
    4  1            0            0            point

Fuselage "boom_2l"
  location (X Y Z) 0.409 -4.022 1, rotation 0 0 0
  bounding box size 4.16 0.151203 0.151203
  Design: Length=4.16
  cross sections:
    n  XLocPercent  YLocPercent  ZLocPercent  shape
    0  0            0            0            point
    1  0.03         0            0            ellipse Ellipse_Height=0.15 Ellipse_Width=0.15
    2  0.97         0            0            as above
    3  1            0            0            ellipse Ellipse_Height=0.05 Ellipse_Width=0.05
    4  1            0            0            point

Fuselage "boom_3l"
  location (X Y Z) 0.409 -6.631 1.2, rotation 0 0 0
  bounding box size 4.16 0.151203 0.151203
  Design: Length=4.16
  cross sections:
    n  XLocPercent  YLocPercent  ZLocPercent  shape
    0  0            0            0            point
    1  0.03         0            0            ellipse Ellipse_Height=0.15 Ellipse_Width=0.15
    2  0.97         0            0            as above
    3  1            0            0            ellipse Ellipse_Height=0.05 Ellipse_Width=0.05
    4  1            0            0            point
