OpenVSP model (file version 5), 9 components.
Geometry view with OpenVSP parameter names; values to 6 digits, angles in degrees, lengths in the model's unit.
Overall bounding box: X_Min=0 X_Len=6.56972 Y_Min=-4.6607 Y_Len=9.3214 Z_Min=-0.467832 Z_Len=1.96809

Wing "main_wing"
  location (X Y Z) 1.778 0 1.073, rotation 0 0 0
  symmetric about XZ
  bounding box size 1.53 9.3214 0.476299
  totals: TotalSpan=9.56944 TotalProjectedSpan=9.31 TotalChord=0.760219 TotalArea=8.19203 TotalAR=10.5805
  root: chord 1.53, twist 0, NACA 4-series Camber=0 CamberLoc=0.2 ThickChord=0.15
  sections:
    n  Span      Root_Chord  Tip_Chord  Area       Sweep  Sweep_Location  Dihedral  Twist  Twist_Location  tip airfoil
    1  0.665665  1.53        1.02051    0.848893   12     0.25            0         0      0.25            as above
    2  3.56108   1.02051     0.65331    2.9803     1.3    0.25            0         0      0.25            as above
    3  0.311758  0.65331     0.51102    0.181494   30     0.25            30        0      0.25            as above
    4  0.246224  0.51102     0.18207    0.0853278  50     0.25            50        0      0.25            as above

Wing "v_tail"
  location (X Y Z) 5.602 0 0.796, rotation 0 0 0
  symmetric about XZ
  bounding box size 0.967721 1.64927 0.750063
  totals: TotalSpan=2.1239 TotalProjectedSpan=1.627 TotalChord=0.52 TotalArea=1.10443 TotalAR=2.39684
  root: chord 0.763, twist 0, NACA 4-series Camber=0 CamberLoc=0.2 ThickChord=0.12
  sections:
    n  Span     Root_Chord  Tip_Chord  Area      Sweep   Sweep_Location  Dihedral  Twist  Twist_Location  tip airfoil
    1  1.06195  0.763       0.277      0.552213  28.192  0.25            40        0      0.25            as above

Fuselage "fuselage"
  location (X Y Z) 0 0 0, rotation 0 0 0
  bounding box size 6.46 1.28478 1.64073
  Design: Length=6.46
  cross sections:
    n  XLocPercent  YLocPercent  ZLocPercent  shape
    0  0            0            0            point
    1  0.026        0            0.00849      ellipse Ellipse_Height=0.481 Ellipse_Width=0.553
    2  0.074        0            0.02874      ellipse Ellipse_Height=1 Ellipse_Width=0.912
    3  0.161        0            0.04348      ellipse Ellipse_Height=1.41 Ellipse_Width=1.174
    4  0.284        0            0.05435      ellipse Ellipse_Height=1.62 Ellipse_Width=1.276
    5  0.531        0            0.05983      ellipse Ellipse_Height=1.409 Ellipse_Width=1.121
    6  0.651        0            0.07079      ellipse Ellipse_Height=1.11 Ellipse_Width=0.833
    7  0.773        0            0.08127      ellipse Ellipse_Height=0.78 Ellipse_Width=0.512
    8  1            0            0.10586      ellipse Ellipse_Height=0.195 Ellipse_Width=0.13
    9  1            0            0.10586      point

Fuselage "boom_1r"
  location (X Y Z) 1.25 1.25 0.939, rotation 0 0 0
  bounding box size 2.61 0.152967 0.152967
  Design: Length=2.61
  cross sections:
    n  XLocPercent  YLocPercent  ZLocPercent  shape
    0  0            0            0            point
    1  0.0766284    0            0            ellipse Ellipse_Height=0.15 Ellipse_Width=0.15
    2  0.91954      0            0            as above
    3  1            0            0            ellipse Ellipse_Height=0.05 Ellipse_Width=0.05
    4  1            0            0            point

Fuselage "boom_2r"
  location (X Y Z) 1.25 2.65 0.939, rotation 0 0 0
  bounding box size 2.61 0.152967 0.152967
  Design: Length=2.61
  cross sections:
    n  XLocPercent  YLocPercent  ZLocPercent  shape
    0  0            0            0            point
    1  0.0766284    0            0            ellipse Ellipse_Height=0.15 Ellipse_Width=0.15
    2  0.91954      0            0            as above
    3  1            0            0            ellipse Ellipse_Height=0.05 Ellipse_Width=0.05
    4  1            0            0            point

Fuselage "boom_3r"
  location (X Y Z) 1.25 4.05 0.939, rotation 0 0 0
  bounding box size 2.61 0.152967 0.152967
  Design: Length=2.61
  cross sections:
    n  XLocPercent  YLocPercent  ZLocPercent  shape
    0  0            0            0            point
    1  0.0766284    0            0            ellipse Ellipse_Height=0.15 Ellipse_Width=0.15
    2  0.91954      0            0            as above
    3  1            0            0            ellipse Ellipse_Height=0.05 Ellipse_Width=0.05
    4  1            0            0            point

Fuselage "Boom_1l"
  location (X Y Z) 1.25 -1.25 0.939, rotation 0 0 0
  bounding box size 2.61 0.152967 0.152967
  Design: Length=2.61
  cross sections:
    n  XLocPercent  YLocPercent  ZLocPercent  shape
    0  0            0            0            point
    1  0.0766284    0            0            ellipse Ellipse_Height=0.15 Ellipse_Width=0.15
    2  0.91954      0            0            as above
    3  1            0            0            ellipse Ellipse_Height=0.05 Ellipse_Width=0.05
    4  1            0            0            point

Fuselage "boom_2l"
  location (X Y Z) 1.25 -2.65 0.939, rotation 0 0 0
  bounding box size 2.61 0.152967 0.152967
  Design: Length=2.61
  cross sections:
    n  XLocPercent  YLocPercent  ZLocPercent  shape
    0  0            0            0            point
    1  0.0766284    0            0            ellipse Ellipse_Height=0.15 Ellipse_Width=0.15
    2  0.91954      0            0            as above
    3  1            0            0            ellipse Ellipse_Height=0.05 Ellipse_Width=0.05
    4  1            0            0            point

Fuselage "boom_3l"
  location (X Y Z) 1.25 -4.05 0.939, rotation 0 0 0
  bounding box size 2.61 0.152967 0.152967
  Design: Length=2.61
  cross sections:
    n  XLocPercent  YLocPercent  ZLocPercent  shape
    0  0            0            0            point
    1  0.0766284    0            0            ellipse Ellipse_Height=0.15 Ellipse_Width=0.15
    2  0.91954      0            0            as above
    3  1            0            0            ellipse Ellipse_Height=0.05 Ellipse_Width=0.05
    4  1            0            0            point
